#set tmp=../test_market_exercise_4_4_1
#setenv GRIDLABD=../../../core

module mysql;
module market;

object database {
  hostname "localhost";
  username "gridlabd";
  password "";
  schema "gridlabd";
  port 3306;
}

clock {
	timezone PST+8PDT;
	starttime '2001-01-01 00:00:00';
	stoptime '2001-01-08 00:00:00';
}

schedule buyer_price {
	* * * * * 10;
}

schedule seller_1_price {
	* 0-17 * * * 5;
	* 18-21 * * * 10;
	* 22-23 * * * 60;
}

schedule seller_2_price {
	* 0-5 * * * 20;
	* 6-8 * * * 40;
	* 9-17 * * * 20;
	* 18-21 * * * 30;
	* 22-23 * * * 80;
}

schedule seller_3_price {
	* 0-5 * * * 40;
	* 6-8 * * * 60;
	* 9-17 * * * 40;
	* 18-21 * * * 50;
	* 22-23 * * * 100;
}

schedule buyer_quantity {
	* 0-5 * * * 1;
	* 6-8 * * * 5;
	* 9-17 * * * 2;
	* 18-21 * * * 10;
	* 22-23 * * * 3;
}

schedule seller_quantity {
	* 0-5 * * * 1.5;
	* 6-8 * * * 7.5;
	* 9-17 * * * 2;
	* 18-21 * * * 15;
	* 22-23 * * * 3;
}

object auction {
	name Market_1;
	warmup 0;
	unit MWh;
	period 1800;
	verbose FALSE;
	special_mode NONE;
	object recorder {
		property current_market.clearing_price;
		table "clearing_price";
		interval 3600;
	};
	object recorder {
		property current_market.clearing_quantity;
		table "clearing_quantity";
		interval 3600;
	};
	object recorder {
		property market_id;
		table "market_id";
		interval 3600;
	};
}

object stub_bidder {
	name buyer_1;
	role BUYER;
	bid_period 300;
	market Market_1;
	price buyer_price*1;
	quantity buyer_quantity*1;
	count 10000;
	object recorder {
		property price;
		table "buyer_1_price";
		interval 3600;
	};
	object recorder {
		property quantity;
		table "buyer_1_quantity";
		interval 3600;
	};
}

object stub_bidder {
	name buyer_2;
	role BUYER;
	bid_period 1800;
	market Market_1;
	price buyer_price*3;
	quantity buyer_quantity*1;
	count 10000;
	object recorder {
		property price;
		table "buyer_2_price";
		interval 3600;
	};
	object recorder {
		property quantity;
		table "buyer_2_quantity";
		interval 3600;
	};
}

object stub_bidder {
	name buyer_3;
	role BUYER;
	bid_period 1800;
	market Market_1;
	price buyer_price*5;
	quantity buyer_quantity*1;
	count 10000;
	object recorder {
		property price;
		table "buyer_3_price";
		interval 3600;
	};
	object recorder {
		property quantity;
		table "buyer_3_quantity";
		interval 3600;
	};
}

object stub_bidder {
	name seller_1;
	role SELLER;
	bid_period 1800;
	market Market_1;
	price seller_1_price*1;
	quantity seller_quantity*1;
	count 10000;
	object recorder {
		property price;
		table "seller_1_price";
		interval 3600;
	};
	object recorder {
		property quantity;
		table "seller_1_quantity";
		interval 3600;
	};
}

object stub_bidder {
	name seller_2;
	role SELLER;
	bid_period 1800;
	market Market_1;
	price seller_2_price*1;
	quantity seller_quantity*1;
	count 10000;
	object recorder {
		property price;
		table "seller_2_price";
		interval 3600;
	};
	object recorder {
		property quantity;
		table "seller_2_quantity";
		interval 3600;
	};
}

object stub_bidder {
	name seller_3;
	role SELLER;
	bid_period 1800;
	market Market_1;
	price seller_3_price*1;
	quantity seller_quantity*1;
	count 10000;
	object recorder {
		property price;
		table "seller_3_price";
		interval 3600;
	};
	object recorder {
		property quantity;
		table "seller_3_quantity";
		interval 3600;
	};
}
